*Heading
** Job name: Job-1 Model name: OpenKnee_model
** Generated by: Abaqus/CAE 2021.HF4
*Preprint, echo=NO, model=NO, history=NO, contact=NO
** ----------------------------------------------------------------
**
** PART INSTANCE: meniscus_LAT-1
**
*Node
      1,   82.5949554,   60.6656494,   53.9628105
      2,   84.0095825,   60.7563171,    53.973053
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*Element, type=C3D8H
  1,   29,   30,   37,   36,    1,    2,    9,    8
  2,   30,   31,   38,   37,    2,    3,   10,    9
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*Nset, nset=meniscus_LAT-1__PickedSet15, generate
    1,  1372,     1
*Elset, elset=meniscus_LAT-1__PickedSet15, generate
   1,  864,    1
*Elset, elset=_meniscus_LAT-1_surface_S5
  13,  14,  15,  16,  17,  18
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*Elset, elset=_meniscus_LAT-1_surface_S4, generate
   6,  864,    6
*Elset, elset=_meniscus_LAT-1_surface_S6, generate
   1,  859,    6
*Elset, elset=_meniscus_LAT-1_surface_S2, generate
  1,  18,   1
*Elset, elset=_meniscus_LAT-1_surface_S1, generate
 847,  864,    1
*Elset, elset=_meniscus_LAT-1_surface_S3
   1,   2,   3,   4,   5,   6
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*Surface, type=ELEMENT, name=meniscus_LAT-1_surface
_meniscus_LAT-1_surface_S5, S5
_meniscus_LAT-1_surface_S4, S4
_meniscus_LAT-1_surface_S6, S6
_meniscus_LAT-1_surface_S2, S2
_meniscus_LAT-1_surface_S1, S1
_meniscus_LAT-1_surface_S3, S3
** Section: LAT
*Solid Section, elset=meniscus_LAT-1__PickedSet15, material=LAT
,
** ----------------------------------------------------------------
**
** PART INSTANCE: meniscus_MED-1
**
*Node
   1373,   102.424385,   58.3709259,   34.3594475
   1374,   104.691673,   59.5432625,    34.284523
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*Element, type=C3D8H
 865, 1428, 1427, 1413, 1412, 1400, 1399, 1385, 1384
 866, 1428, 1403, 1402, 1415, 1400, 1375, 1374, 1387
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*Nset, nset=meniscus_MED-1__PickedSet10, generate
 1373,  2576,     1
*Elset, elset=meniscus_MED-1__PickedSet10, generate
 865, 1620,    1
*Elset, elset=meniscus_MED-1_Ring, generate
 865, 1603,   18
*Elset, elset=meniscus_MED-1__PickedSet18, generate
 865, 1603,   18
*Elset, elset=_meniscus_MED-1_surface_S4
 866, 869, 870, 871, 878, 880
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*Elset, elset=_meniscus_MED-1_surface_S6
 867, 872, 875, 879, 885, 890
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*Elset, elset=_meniscus_MED-1_surface_S2, generate
865, 882,   1
*Elset, elset=_meniscus_MED-1_surface_S5
 865, 876, 881, 883, 894, 899
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*Elset, elset=_meniscus_MED-1_surface_S3
 867, 868, 872, 875, 880, 885
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*Elset, elset=_meniscus_MED-1_surface_S1, generate
1603, 1620,    1
*Surface, type=ELEMENT, name=meniscus_MED-1_surface
_meniscus_MED-1_surface_S4, S4
_meniscus_MED-1_surface_S6, S6
_meniscus_MED-1_surface_S2, S2
_meniscus_MED-1_surface_S5, S5
_meniscus_MED-1_surface_S3, S3
_meniscus_MED-1_surface_S1, S1
*Elset, elset=_meniscus_MED-1_Out_Ring_Surf_S5, generate
 865, 1603,   18
*Surface, type=ELEMENT, name=meniscus_MED-1_Out_Ring_Surf
_meniscus_MED-1_Out_Ring_Surf_S5, S5
** Section: Ring
*Solid Section, elset=meniscus_MED-1__PickedSet18, material=MED
,
** Region: (MED:Picked)
*Elset, elset=meniscus_MED-1__I2
 866, 867, 868, 869, 870, 871
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** Section: MED
*Solid Section, elset=meniscus_MED-1__I2, material=MED
,
** ----------------------------------------------------------------
**
** PART INSTANCE: acl-1
**
*Node
   2577,   77.5595779,   49.6807137,   49.4603043
   2578,   77.3483124,   49.3781548,   48.7122421
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*Element, type=C3D8H
1621, 2613, 2614, 2623, 2622, 2577, 2578, 2587, 2586
1622, 2614, 2615, 2624, 2623, 2578, 2579, 2588, 2587
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*Nset, nset=acl-1__PickedSet16, generate
 2577,  3944,     1
*Elset, elset=acl-1__PickedSet16, generate
1621, 2508,    1
*Elset, elset=_acl-1_surface_S3
1621,1622,1623,1624,1625,1626
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*Elset, elset=_acl-1_surface_S6, generate
1621, 2501,    8
*Elset, elset=_acl-1_surface_S4, generate
1628, 2508,    8
*Elset, elset=_acl-1_surface_S5
1637,1638,1639,1640,1641,1642
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*Surface, type=ELEMENT, name=acl-1_surface
_acl-1_surface_S3, S3
_acl-1_surface_S6, S6
_acl-1_surface_S4, S4
_acl-1_surface_S5, S5
*Elset, elset=_acl-1_tibia_insertion_S2, generate
1621, 1644,   1
*Surface, type=ELEMENT, name=acl-1_tibia_insertion
_acl-1_tibia_insertion_S2, S2
*Elset, elset=_acl-1_femur_insertion_S1, generate
2485, 2508,    1
*Surface, type=ELEMENT, name=acl-1_femur_insertion
_acl-1_femur_insertion_S1, S1
** Section: ACL
*Solid Section, elset=acl-1__PickedSet16, material=ACL
,
** ----------------------------------------------------------------
**
** PART INSTANCE: lcl-1
**
*Node
   3945,   106.765572,   37.9326668,   83.7264099
   3946,   105.967033,   37.9326668,   83.7110367
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*Element, type=C3D8H
2509, 3977, 3978, 3986, 3985, 3945, 3946, 3954, 3953
2510, 3978, 3979, 3987, 3986, 3946, 3947, 3955, 3954
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*Nset, nset=lcl-1__PickedSet18, generate
 3945,  5000,     1
*Elset, elset=lcl-1__PickedSet18, generate
2509, 3180,    1
*Elset, elset=_lcl-1_surface_S3
2509,2510,2511,2512,2513,2514
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*Elset, elset=_lcl-1_surface_S5
2523,2524,2525,2526,2527,2528
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*Elset, elset=_lcl-1_surface_S4, generate
2515, 3180,    7
*Elset, elset=_lcl-1_surface_S6, generate
2509, 3174,    7
*Surface, type=ELEMENT, name=lcl-1_surface
_lcl-1_surface_S3, S3
_lcl-1_surface_S5, S5
_lcl-1_surface_S4, S4
_lcl-1_surface_S6, S6
*Elset, elset=_lcl-1_fibula_insertion_S2, generate
2509, 2529,   1
*Surface, type=ELEMENT, name=lcl-1_fibula_insertion
_lcl-1_fibula_insertion_S2, S2
*Elset, elset=_lcl-1_femur_insertion_S1, generate
3160, 3180,    1
*Surface, type=ELEMENT, name=lcl-1_femur_insertion
_lcl-1_femur_insertion_S1, S1
** Section: LCL
*Solid Section, elset=lcl-1__PickedSet18, material=LCL
,
** ----------------------------------------------------------------
**
** PART INSTANCE: mcl-1
**
*Node
   5001,   92.0203018,   79.3631668,           9.
   5002,   90.9470367,   79.1234512,           9.
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*Element, type=C3D8H
3181, 5033, 5034, 5042, 5041, 5001, 5002, 5010, 5009
3182, 5034, 5035, 5043, 5042, 5002, 5003, 5011, 5010
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*Nset, nset=mcl-1__PickedSet15, generate
 5001,  6280,     1
*Elset, elset=mcl-1__PickedSet15, generate
3181, 3999,    1
*Elset, elset=_mcl-1_surface_S6, generate
3181, 3993,    7
*Elset, elset=_mcl-1_surface_S4, generate
3187, 3999,    7
*Elset, elset=_mcl-1_surface_S3
3181,3182,3183,3184,3185,3186
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*Elset, elset=_mcl-1_surface_S5
3195,3196,3197,3198,3199,3200
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*Surface, type=ELEMENT, name=mcl-1_surface
_mcl-1_surface_S6, S6
_mcl-1_surface_S4, S4
_mcl-1_surface_S3, S3
_mcl-1_surface_S5, S5
*Elset, elset=_mcl-1_femur_insertion_S2, generate
3181, 3201,   1
*Surface, type=ELEMENT, name=mcl-1_femur_insertion
_mcl-1_femur_insertion_S2, S2
*Elset, elset=_mcl-1_tibia_insertion_S1, generate
3979, 3999,    1
*Surface, type=ELEMENT, name=mcl-1_tibia_insertion
_mcl-1_tibia_insertion_S1, S1
** Section: MCL
*Solid Section, elset=mcl-1__PickedSet15, material=MCL
,
** ----------------------------------------------------------------
**
** PART INSTANCE: pcl-1
**
*Node
   6281,   112.377457,   52.3554382,   49.1815453
   6282,   112.161919,   52.0200386,   48.3891525
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*Element, type=C3D8H
4000, 6333, 6334, 6347, 6346, 6281, 6282, 6295, 6294
4001, 6334, 6335, 6348, 6347, 6282, 6283, 6296, 6295
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*Nset, nset=pcl-1__PickedSet11, generate
 6281,  8152,     1
*Elset, elset=pcl-1__PickedSet11, generate
 4000,  5259,     1
*Elset, elset=_pcl-1_surface_S5
 4024, 4025, 4026, 4027, 4028, 4029
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*Elset, elset=_pcl-1_surface_S6, generate
 4000,  5248,    12
*Elset, elset=_pcl-1_surface_S4, generate
 4011,  5259,    12
*Elset, elset=_pcl-1_surface_S3
 4000, 4001, 4002, 4003, 4004, 4005
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*Surface, type=ELEMENT, name=pcl-1_surface
_pcl-1_surface_S5, S5
_pcl-1_surface_S6, S6
_pcl-1_surface_S4, S4
_pcl-1_surface_S3, S3
*Elset, elset=_pcl-1_tibia_insertion_S2, generate
4000, 4035,   1
*Surface, type=ELEMENT, name=pcl-1_tibia_insertion
_pcl-1_tibia_insertion_S2, S2
*Elset, elset=_pcl-1_femur_insertion_S1, generate
 5224,  5259,     1
*Surface, type=ELEMENT, name=pcl-1_femur_insertion
_pcl-1_femur_insertion_S1, S1
** Section: PCL
*Solid Section, elset=pcl-1__PickedSet11, material=PCL
,
** ----------------------------------------------------------------
**
** PART INSTANCE: tibia_cartilage_LAT-1
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*Elset, elset=tibia_cartilage_LAT-1__PickedSet21, generate
 5260,  7167,     1
*Nset, nset=tibia_cartilage_LAT-1_cartilage_lat_nodes, generate
 8153, 10876,     1
*Elset, elset=tibia_cartilage_LAT-1_cartilage_lat_elements, generate
 5260,  7167,     1
*Elset, elset=_tibia_cartilage_LAT-1_tie_surface_S1, generate
5260, 5895,    1
*Surface, type=ELEMENT, name=tibia_cartilage_LAT-1_tie_surface
_tibia_cartilage_LAT-1_tie_surface_S1, S1
*Elset, elset=_tibia_cartilage_LAT-1_surface_S6
 5312, 5335, 5336, 5342, 5343, 5368
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*Elset, elset=_tibia_cartilage_LAT-1_surface_S4
 5260, 5281, 5316, 5332, 5334, 5337
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*Elset, elset=_tibia_cartilage_LAT-1_surface_S5
 5290, 5302, 5310, 5330, 5333, 5338
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*Elset, elset=_tibia_cartilage_LAT-1_surface_S3
 5316, 5318, 5407, 5415, 5431, 5449
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*Elset, elset=_tibia_cartilage_LAT-1_surface_S2, generate
 6532,  7167,     1
*Surface, type=ELEMENT, name=tibia_cartilage_LAT-1_surface
_tibia_cartilage_LAT-1_surface_S6, S6
_tibia_cartilage_LAT-1_surface_S4, S4
_tibia_cartilage_LAT-1_surface_S2, S2
_tibia_cartilage_LAT-1_surface_S5, S5
_tibia_cartilage_LAT-1_surface_S3, S3
** Section: CAR
*Solid Section, elset=tibia_cartilage_LAT-1__PickedSet21, material=CAR
,
** ----------------------------------------------------------------
**
** PART INSTANCE: tibia_cartilage_MED-1
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*Elset, elset=tibia_cartilage_MED-1__PickedSet26, generate
 7168,  9126,     1
*Nset, nset=tibia_cartilage_MED-1_cartilage_med_nodes, generate
10877, 13664,     1
*Elset, elset=tibia_cartilage_MED-1_cartilage_med_elements, generate
 7168,  9126,     1
*Elset, elset=_tibia_cartilage_MED-1_tie_surface_S1, generate
7168, 7820,    1
*Surface, type=ELEMENT, name=tibia_cartilage_MED-1_tie_surface
_tibia_cartilage_MED-1_tie_surface_S1, S1
*Elset, elset=_tibia_cartilage_MED-1_surface_S2, generate
 8474,  9126,     1
*Elset, elset=_tibia_cartilage_MED-1_surface_S6
 7231, 7252, 7257, 7269, 7290, 7305
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*Elset, elset=_tibia_cartilage_MED-1_surface_S4
 7194, 7235, 7240, 7266, 7267, 7286
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*Elset, elset=_tibia_cartilage_MED-1_surface_S3
 7170, 7191, 7214, 7235, 7236, 7239
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*Elset, elset=_tibia_cartilage_MED-1_surface_S5
 7169, 7195, 7213, 7230, 7232, 7243
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*Surface, type=ELEMENT, name=tibia_cartilage_MED-1_surface
_tibia_cartilage_MED-1_surface_S2, S2
_tibia_cartilage_MED-1_surface_S6, S6
_tibia_cartilage_MED-1_surface_S4, S4
_tibia_cartilage_MED-1_surface_S3, S3
_tibia_cartilage_MED-1_surface_S5, S5
** Section: CAR
*Solid Section, elset=tibia_cartilage_MED-1__PickedSet26, material=CAR
,
** ----------------------------------------------------------------
**
** PART INSTANCE: femur_cartilage-1
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*Elset, elset=femur_cartilage-1__PickedSet25, generate
 9127, 16515,     1
*Nset, nset=femur_cartilage-1_femur_cartilage_nodes, generate
 13665,  24000,      1
*Elset, elset=femur_cartilage-1_femur_cartilage_elements, generate
 9127, 16515,     1
*Elset, elset=_femur_cartilage-1_tie_surface_S2, generate
 9127, 11589,     1
*Surface, type=ELEMENT, name=femur_cartilage-1_tie_surface
_femur_cartilage-1_tie_surface_S2, S2
*Elset, elset=_femur_cartilage-1_surface_S1, generate
14053, 16515,     1
*Elset, elset=_femur_cartilage-1_surface_S3
 9127, 9128, 9214, 9249, 9250, 9251
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*Elset, elset=_femur_cartilage-1_surface_S6
 9140, 9155, 9195, 9226, 9227, 9316
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*Elset, elset=_femur_cartilage-1_surface_S5
 9156, 9157, 9215, 9225, 9290, 9320
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*Elset, elset=_femur_cartilage-1_surface_S4
 9141, 9169, 9170, 9196, 9197, 9229
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*Surface, type=ELEMENT, name=femur_cartilage-1_surface
_femur_cartilage-1_surface_S1, S1
_femur_cartilage-1_surface_S3, S3
_femur_cartilage-1_surface_S6, S6
_femur_cartilage-1_surface_S4, S4
_femur_cartilage-1_surface_S5, S5
** Section: CAR
*Solid Section, elset=femur_cartilage-1__PickedSet25, material=CAR
,
** ----------------------------------------------------------------
**
** PART INSTANCE: tibia-1
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*Nset, nset=tibia-1-RefPt_
28027,
*Nset, nset=tibia-1_RP
28027,
*Elset, elset=_tibia-1_medial_cap_SPOS, generate
24195, 24261,     1
*Surface, type=ELEMENT, name=tibia-1_medial_cap
_tibia-1_medial_cap_SPOS, SPOS
*Elset, elset=_tibia-1_lateral_cap_SPOS, generate
24262, 24341,     1
*Surface, type=ELEMENT, name=tibia-1_lateral_cap
_tibia-1_lateral_cap_SPOS, SPOS
*Elset, elset=_tibia-1_surface_SPOS, generate
16516, 24194,     1
*Surface, type=ELEMENT, name=tibia-1_surface
_tibia-1_surface_SPOS, SPOS
*Elset, elset=tibia-1, generate
16516, 24341,     1
** ----------------------------------------------------------------
**
** PART INSTANCE: femur-1
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*Nset, nset=femur-1-RefPt_
32809,
*Nset, nset=femur-1_RP
32809,
*Elset, elset=_femur-1_medial_cap_SPOS, generate
33342, 33471,     1
*Surface, type=ELEMENT, name=femur-1_medial_cap
_femur-1_medial_cap_SPOS, SPOS
*Elset, elset=_femur-1_lateral_cap_SPOS, generate
33472, 33619,     1
*Surface, type=ELEMENT, name=femur-1_lateral_cap
_femur-1_lateral_cap_SPOS, SPOS
*Elset, elset=_femur-1_surface_SPOS, generate
24342, 33341,     1
*Surface, type=ELEMENT, name=femur-1_surface
_femur-1_surface_SPOS, SPOS
*Elset, elset=femur-1, generate
24342, 33619,     1
*System
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*Nset, nset=Femur_Refrence_Point
32809,
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*Nset, nset=Men_Lat_Horn_AntSuf, generate
 1345,  1372,     1
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*Nset, nset=Men_Lat_Horn_PostSurf, generate
  1,  28,   1
*Elset, elset=Men_Lat_Horn_PostSurf, generate
  1,  18,   1
*Nset, nset=Men_Med_Horn_AntSurf, generate
1373, 1400,   1
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*Nset, nset=Men_Med_Horn_PostSurf, generate
 2549,  2576,     1
*Elset, elset=Men_Med_Horn_PostSurf, generate
1603, 1620,    1
*Elset, elset=PCLELM, generate
 4000,  5259,     1
*Nset, nset=Set-24, generate
 8153, 10876,     1
*Nset, nset=Set-24, generate
10877, 13664,     1
*Nset, nset=Set-24, generate
 13665,  24000,      1
*Nset, nset=Tibia_Reference_Point
28027,
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*Elset, elset=_Meniscus_Lat_Horn_Ant_S1, generate
 847,  864,    1
*Surface, type=ELEMENT, name=Meniscus_Lat_Horn_Ant
_Meniscus_Lat_Horn_Ant_S1, S1
*Elset, elset=_Meniscus_Lat_Horn_Post_S2, generate
  1,  18,   1
*Surface, type=ELEMENT, name=Meniscus_Lat_Horn_Post
_Meniscus_Lat_Horn_Post_S2, S2
*Elset, elset=_Meniscus_Med_Horn_Ant_S2, generate
865, 882,   1
*Surface, type=ELEMENT, name=Meniscus_Med_Horn_Ant
_Meniscus_Med_Horn_Ant_S2, S2
*Elset, elset=_Meniscus_Med_Horn_Periph_S5, generate
 865, 1603,   18
*Elset, elset=_Meniscus_Med_Horn_Periph_S3, generate
 872, 1610,   18
*Elset, elset=_Meniscus_Med_Horn_Periph_S6, generate
 875, 1613,   18
*Surface, type=ELEMENT, name=Meniscus_Med_Horn_Periph
_Meniscus_Med_Horn_Periph_S5, S5
_Meniscus_Med_Horn_Periph_S3, S3
_Meniscus_Med_Horn_Periph_S6, S6
*Elset, elset=_Meniscus_Med_Horn_Post_S1, generate
1603, 1620,    1
*Surface, type=ELEMENT, name=Meniscus_Med_Horn_Post
_Meniscus_Med_Horn_Post_S1, S1
*Rigid Body, ref node=tibia-1-RefPt_, elset=tibia-1
*Rigid Body, ref node=femur-1-RefPt_, elset=femur-1
** Constraint: Fem_Cartil
*Tie, name=Fem_Cartil, adjust=yes
femur_cartilage-1_tie_surface, femur-1_surface
** Constraint: Tib_LatCartil
*Tie, name=Tib_LatCartil, adjust=yes
tibia_cartilage_LAT-1_tie_surface, tibia-1_surface
** Constraint: Tib_MedCartil
*Tie, name=Tib_MedCartil, adjust=yes
tibia_cartilage_MED-1_tie_surface, tibia-1_surface
** Constraint: acl_Fem
*Tie, name=acl_Fem, adjust=yes
acl-1_femur_insertion, femur-1_surface
** Constraint: acl_Tib
*Tie, name=acl_Tib, adjust=yes
acl-1_tibia_insertion, tibia-1_surface
** Constraint: lcl_Fem
*Tie, name=lcl_Fem, adjust=yes
lcl-1_femur_insertion, femur-1_lateral_cap
** Constraint: mcl_Fem
*Tie, name=mcl_Fem, adjust=yes
mcl-1_femur_insertion, femur-1_medial_cap
** Constraint: mcl_Tib
*Tie, name=mcl_Tib, adjust=yes
mcl-1_tibia_insertion, tibia-1_surface
** Constraint: pcl_Fem
*Tie, name=pcl_Fem, adjust=yes
pcl-1_femur_insertion, femur-1_surface
** Constraint: pcl_Tib
*Tie, name=pcl_Tib, adjust=yes
pcl-1_tibia_insertion, tibia-1_surface
*Nset, nset=_PickedSet223_PP_, generate
10196, 10876,     1
*Nset, nset=_PickedSet223_PP_, generate
12968, 13664,     1
*Nset, nset=_PickedSet223_PP_, generate
 21417,  24000,      1
*Amplitude, name=Amp-1, definition=SMOOTH STEP
             0.,              0.,              1.,              1.
**
** MATERIALS
**
*Material, name=ACL
*Hyperelastic, neo hooke
 6.06,0.
*Material, name=CAR
*Hyperelastic, neo hooke
 2.48, 0.59
*Permeability, specific=9.81e-06
 1.37972e-09, 2.5
  1.6133e-09, 2.6
 1.88498e-09, 2.7
  2.2012e-09, 2.8
 2.56955e-09, 2.9
 2.99899e-09,  3.
  3.5001e-09, 3.1
 4.08542e-09, 3.2
 4.76976e-09, 3.3
 5.57075e-09, 3.4
 6.50926e-09, 3.5
 7.61017e-09, 3.6
 8.90308e-09, 3.7
 1.04233e-08, 3.8
  1.2213e-08, 3.9
 1.43226e-08,  4.
 1.68125e-08, 4.1
 1.97551e-08, 4.2
 2.32374e-08, 4.3
  2.7364e-08, 4.4
 3.22609e-08, 4.5
 3.80801e-08, 4.6
 4.50052e-08, 4.7
 5.32583e-08, 4.8
 6.31087e-08, 4.9
 7.48829e-08,  5.
  8.8978e-08, 5.1
 1.05877e-07, 5.2
*Material, name=IMP
*Elastic
20., 0.3
*Material, name=LAT
*Elastic
59., 0.49
*Material, name=LCL
*Hyperelastic, neo hooke
 6.06,0.
*Material, name=MCL
*Hyperelastic, neo hooke
 5.38,0.
*Material, name=MED
*Elastic
59., 0.49
*Material, name=PCL
*Hyperelastic, neo hooke
 6.43,0.
*Material, name=RIN
*Elastic
59., 0.49
**
** INTERACTION PROPERTIES
**
*Surface Interaction, name=Fricless
1.,
*Friction
0.,
*Surface Interaction, name=Implant
1.,
*Friction, slip tolerance=0.005
 0.05,
*Surface Interaction, name=IntProp-1
1.,
*Friction, slip tolerance=0.005
 0.02,
**
** BOUNDARY CONDITIONS
**
** Name: Femur Type: Displacement/Rotation
*Boundary
Femur_Refrence_Point, 1, 1
Femur_Refrence_Point, 2, 2
Femur_Refrence_Point, 3, 3
Femur_Refrence_Point, 4, 4
Femur_Refrence_Point, 5, 5
Femur_Refrence_Point, 6, 6
** Name: Horn1 Type: Displacement/Rotation
*Boundary
Men_Lat_Horn_AntSuf, 1, 1
Men_Lat_Horn_AntSuf, 3, 3
Men_Lat_Horn_AntSuf, 4, 4
Men_Lat_Horn_AntSuf, 5, 5
Men_Lat_Horn_AntSuf, 6, 6
** Name: Horn2 Type: Displacement/Rotation
*Boundary
Men_Lat_Horn_PostSurf, 1, 1
Men_Lat_Horn_PostSurf, 3, 3
Men_Lat_Horn_PostSurf, 4, 4
Men_Lat_Horn_PostSurf, 5, 5
Men_Lat_Horn_PostSurf, 6, 6
** Name: Horn3 Type: Displacement/Rotation
*Boundary
Men_Med_Horn_AntSurf, 1, 1
Men_Med_Horn_AntSurf, 3, 3
Men_Med_Horn_AntSurf, 4, 4
Men_Med_Horn_AntSurf, 5, 5
Men_Med_Horn_AntSurf, 6, 6
** Name: Horn4 Type: Displacement/Rotation
*Boundary
Men_Med_Horn_PostSurf, 1, 1
Men_Med_Horn_PostSurf, 3, 3
Men_Med_Horn_PostSurf, 4, 4
Men_Med_Horn_PostSurf, 5, 5
Men_Med_Horn_PostSurf, 6, 6
** Name: PORE Type: Pore pressure
*Boundary
_PickedSet223_PP_, 8, 8
** Name: Tibia Type: Displacement/Rotation
*Boundary
Tibia_Reference_Point, 1, 1
Tibia_Reference_Point, 2, 2
Tibia_Reference_Point, 3, 3
Tibia_Reference_Point, 4, 4
Tibia_Reference_Point, 5, 5
Tibia_Reference_Point, 6, 6
**
** PREDEFINED FIELDS
**
** Name: MZ   Type: Void ratio
*Initial Conditions, TYPE=RATIO
Set-24, 4.
**
** INTERACTIONS
**
** Interaction: FemCartil_MedMen
*Contact Pair, interaction=Implant, type=SURFACE TO SURFACE
meniscus_MED-1_surface, femur_cartilage-1_surface
** Interaction: FemCartil_TibCartil_Lat
*Contact Pair, interaction=IntProp-1, type=SURFACE TO SURFACE, adjust=0.6
tibia_cartilage_LAT-1_surface, femur_cartilage-1_surface
** Interaction: FemCartil_TibCartil_Med
*Contact Pair, interaction=IntProp-1, type=SURFACE TO SURFACE, adjust=0.6
tibia_cartilage_MED-1_surface, femur_cartilage-1_surface
** Interaction: Femcartil_LatMen
*Contact Pair, interaction=IntProp-1, type=SURFACE TO SURFACE
meniscus_LAT-1_surface, femur_cartilage-1_surface
** Interaction: TibCartil_LatMen
*Contact Pair, interaction=IntProp-1, type=SURFACE TO SURFACE
meniscus_LAT-1_surface, tibia_cartilage_LAT-1_surface
** Interaction: TibCartil_MedMen
*Contact Pair, interaction=Implant, type=SURFACE TO SURFACE
meniscus_MED-1_surface, tibia_cartilage_MED-1_surface
*INITIAL CONDITIONS,TYPE=SOLUTION, USER
** ----------------------------------------------------------------
**
** STEP: LOAD
**
*Step, name=LOAD, nlgeom=YES, amplitude=RAMP
*Soils, consolidation, end=PERIOD, utol=1., creep=none
5., 10., 1e-05, 10.,
**
** BOUNDARY CONDITIONS
**
** Name: Femur Type: Displacement/Rotation
*Boundary, op=NEW
Femur_Refrence_Point, 6, 6
** Name: Horn1 Type: Displacement/Rotation
*Boundary, op=NEW
Men_Lat_Horn_AntSuf, 1, 1
Men_Lat_Horn_AntSuf, 3, 3
Men_Lat_Horn_AntSuf, 4, 4
Men_Lat_Horn_AntSuf, 5, 5
Men_Lat_Horn_AntSuf, 6, 6
** Name: Horn2 Type: Displacement/Rotation
*Boundary, op=NEW
Men_Lat_Horn_PostSurf, 1, 1
Men_Lat_Horn_PostSurf, 3, 3
Men_Lat_Horn_PostSurf, 4, 4
Men_Lat_Horn_PostSurf, 5, 5
Men_Lat_Horn_PostSurf, 6, 6
** Name: Horn3 Type: Displacement/Rotation
*Boundary, op=NEW
Men_Med_Horn_AntSurf, 1, 1
Men_Med_Horn_AntSurf, 3, 3
Men_Med_Horn_AntSurf, 4, 4
Men_Med_Horn_AntSurf, 5, 5
Men_Med_Horn_AntSurf, 6, 6
** Name: Horn4 Type: Displacement/Rotation
*Boundary, op=NEW
Men_Med_Horn_PostSurf, 1, 1
Men_Med_Horn_PostSurf, 3, 3
Men_Med_Horn_PostSurf, 4, 4
Men_Med_Horn_PostSurf, 5, 5
Men_Med_Horn_PostSurf, 6, 6
** Name: PORE Type: Pore pressure
*Boundary, op=NEW
_PickedSet223_PP_, 8, 8
** Name: Tibia Type: Displacement/Rotation
*Boundary, op=NEW
Tibia_Reference_Point, 1, 1
Tibia_Reference_Point, 2, 2
Tibia_Reference_Point, 3, 3
Tibia_Reference_Point, 4, 4
Tibia_Reference_Point, 5, 5
Tibia_Reference_Point, 6, 6
**
** LOADS
**
** Name: Static_Load   Type: Concentrated force
*Cload, follower
Femur_Refrence_Point, 2, -415.692
**
** OUTPUT REQUESTS
**
*Restart, write, frequency=0
**
** FIELD OUTPUT: F-Output-1
**
*Output, field, frequency=99999
*Element Output, directions=YES
LE, S
*Output, history, frequency=0
*End Step
